*NODE
 1, 0.0, 0.0, 0.0
 2, 3.0, 0.0, 0.0
*ELEMENT, TYPE=B33, ELSET=ELSET1
 1, 1,2
*BEAM GENERAL SECTION, ELSET=ELSET1, DENSITY=100.0, SECTION=GENERAL
 0.25, 1.5E-4, 0.0, 1.5E-4, 3.0E-4
 0.0, 0.0, 1.0
 100.0E6, 80.0E6
*STEP
*MATRIX GENERATE, STIFFNESS, MASS, LOAD
*MATRIX OUTPUT, STIFFNESS, MASS, LOAD
*END STEP
